#define RIGHT_HAND_GRIP_FORCES
#define LEFT_HAND_GRIP_FORCES
#define CREATE_NEW_PARAM_STUDY
#define SAVE_ALL_6DOF_FROM_BASE_OBJECT


Main ={

  Main.ModelSetup.MocapDrivers ={

    #ifndef CREATE_NEW_PARAM_STUDY
    #define OPT_STUDY Main.Studies.ParameterIdentification
    #else
    #define OPT_STUDY  Main.ParameterIdentification_External
    #endif

    CreateMarkerDriver Golf_Club1 (
    UseC3DWeightResiduals = ON,
    MarkerPlacement=Main.EnvironmentModel.ExtraModel.Object,
    OptX=OFF, OptY=OFF, OptZ=OFF,
    PARAMETER_OPT_STUDY = OPT_STUDY,
    FilterCutOffFrequency = 20,
    UseC3DWeightResiduals=ON
    ) = {
      sRelOpt ={0.0,0,0};
    };

    CreateMarkerDriver Golf_Club43 (
    UseC3DWeightResiduals = ON,
    MarkerPlacement=Main.EnvironmentModel.ExtraModel.Object,
    OptX=ON, OptY=ON, OptZ=ON,
    PARAMETER_OPT_STUDY = OPT_STUDY,
    FilterCutOffFrequency = 20,
    UseC3DWeightResiduals=ON
    ) = {
      sRelOpt ={0.07,0,-0.05};
    };

    CreateMarkerDriver Golf_Club2 (
    UseC3DWeightResiduals = ON,
    MarkerPlacement=Main.EnvironmentModel.ExtraModel.Object,
    OptX=ON, OptY=OFF, OptZ=OFF,
    PARAMETER_OPT_STUDY = OPT_STUDY,
    FilterCutOffFrequency = 20,
    UseC3DWeightResiduals=ON
    ) = {
      sRelOpt ={0.2,0,0};
    };

    CreateMarkerDriver Golf_Club3 (
    UseC3DWeightResiduals = ON,
    MarkerPlacement=Main.EnvironmentModel.ExtraModel.Object,
    OptX=ON, OptY=ON, OptZ=OFF,
    PARAMETER_OPT_STUDY = OPT_STUDY,
    FilterCutOffFrequency = 20,
    UseC3DWeightResiduals=ON
    ) = {
      sRelOpt ={0.35,0.0,0};
    };

  };


  //Open environment folder and add object
  Main.EnvironmentModel ={
    AnyFolder ExtraModel ={
      //definiton of object
      AnySeg Object = {
        Mass=0.5;  //Guesstimate
        Jii = {0.001,0.001,0.001};//Guesstimate
        JaboutCoMOnOff=On;
        AnyFunTransform3D  GeomScale = {} ;
        AnyRefNode AnatomicalFrame ={};
        //place CoM between club3 and club4 markers
        sCoM =0.5* (      Main.EnvironmentModel.ExtraModel.Object.Golf_Club1.sRel+      Main.EnvironmentModel.ExtraModel.Object.Golf_Club43.sRel      );

        //These lines are a way to estimate the initial position of the object based on the markers, it is used for the first frame starting guess
        r0 = Main.ModelSetup.C3DFileData.Points.Markers.Golf_Club1.PosInterpol(Main.ModelSetup.TrialSpecificData.tStart);
        Axes0=RotMat(
        Main.ModelSetup.C3DFileData.Points.Markers.Golf_Club1.PosInterpol(Main.ModelSetup.TrialSpecificData.tStart),
        Main.ModelSetup.C3DFileData.Points.Markers.Golf_Club3.PosInterpol(Main.ModelSetup.TrialSpecificData.tStart),
        Main.ModelSetup.C3DFileData.Points.Markers.Golf_Club43.PosInterpol(Main.ModelSetup.TrialSpecificData.tStart)
        )*RotMat(0.5*pi,x);

        //Visual appperance
        AnyRefNode StartBat={sRel ={-0.4,0,0};};
        AnyDrawLine DrwLine1 ={
          p0 = .StartBat.sRel;
          p1 = .Golf_Club3.sRel;
          Line.Thickness=0.04;
          Line.RGB={0,0,0};
          GlobalCoord=Off;
        };
      };

      //If having more DOF to Save add ref to the measure here
      AnyKinMeasureOrg Extra_DOFS ={        };
    };
  };

  #include "../ExtraOneSegModelGeneric.any"
};
