#path __BM_PLUGIN_FILE__ "BodyModelConfig.any"
#define BM_CONFIG_PLUGIN __BM_PLUGIN_FILE__

// ----------------------------------------------------------
// Model configuration:
// For more info on body model configuration options please load the model and double click on:
// #include "<ANYBODY_PATH_AMMR>\Documentation\bm_config\index.html"
// ----------------------------------------------------------
Main = {

  #define BM_TRUNK_CERVICAL_MUSCLES OFF
  #define BM_SCALING _SCALING_XYZ_
  #define BM_MANNEQUIN_DRIVER_DEFAULT OFF

  #ifdef UpperBody
    #define BM_TRUNK_MUSCLES ON
  #else
   #define BM_TRUNK_MUSCLES OFF
  #endif

  #ifndef BM_LEG_MODEL
  #define BM_LEG_MODEL _LEG_MODEL_TLEM2_
  #endif

  #ifdef UpperBody
     #define BM_ARM_RIGHT ON
     #define BM_ARM_LEFT ON
  #else
     #define BM_ARM_RIGHT OFF
     #define BM_ARM_LEFT OFF
  #endif
};
